f(x) := (1 + 1/(x^2 + 2))^cos(x)
x0 := 1
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f1(x) := d/dx(f(x))
f1p1(x, h) := (f(x + h) - f(x))/h
f2p1(x, h) := (f(x + h) - f(x - h))/2h
E11(x, h) := |(f1(x) - f1p1(x, h))/f1(x)|
h0 := 1*10^-8
f1(x0) = -0.387979
E12(x, h) := |(f1(x) - f2p1(x, h))/f1(x)|
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