f(x) := (1 + 1/(x^2 + 2))^cos(x)
x0 := 1
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f1(x) := d/dx(f(x))
f1p1(x, h) := (f(x + h) - f(x))/h
E11(x, h) := |(f1p1(x, h) - f1(x))/f1(x)|
sdf := d/dx0(f(x0)) = -0.387979
sfsdsd := f1p1(x0, 2*10^-8) = -0.387979
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h0 := 2*10^-8
E11(x0, h0) = 1.35668e-8
f1p2(x, h) := (f(x + h) - f(x - h))/(2*h)
E12(x, h) := |(f1p2(x, h) - f1(x))/f1(x)|
k := □, □ .. □  # error: Пустой местозаполнитель.
h0 := 1*10^-5
E12(x0, h0) = 3.05743e-12
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f2p(x, h) := (f(x + h) - 2*f(x) + f(x - h))/h^2
f2(x) := d^2/dx^2(f(x))
f2(x0) = 0.292476
E2(x, h) := |(f2p(x, h) - f2(x))/f2(x)|
h0 := 2*10^-4
E2(x0, h0) = 7.12029e-9
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f3(x) := d^3/dx^3(f(x))
f3p(x, h) := (f(x + 2*h) - 3*f(x + h) + 3*f(x) - f(x - h))/h^3
f3(x0) = 0.462576
E3(x, h) := |(f3p(x, h) - f3(x))/f3(x)|
h0 := 10^-4
E3(x0, h0) = 0.000603957
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f4(x) := d^4/dx^4(f(x))
f4p(x, h) := ((f(x + 3*h) - 4*f(x + 2*h) + 6*f(x + h)) - 4*f(x) + f(x - h))/h^4
f4(x0) = -2.64008
E4(x, h) := |(f4p(x, h) - f4(x))/f4(x)|
h0 := 10^-3
E4(x0, h0) = 0.00234345
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