f(x) := (1 + 1/(x^2 + 2))^cos(x)
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x1[0] := 2
x12[0] := 2
t[0] := 0
T := 4
xrk[0] := 2
xrk2[0] := 2
n := 200
x4[0] := 2
x42[0] := 2
h := T/n
h2 := T/(2*n)
m := 0 .. n
m2 := 0 .. 2*n
t[m + 1] := t[m] + h
# Метод Эйлера
x1[m + 1] := x1[m] + h*f(x1[m])
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x12[m2 + 1] := x12[m2] + h2*f(x12[m2])
δ1 := |x1[n] - x12[2*n]|*2/|2 - 1|
δ1 = 0.000905533
# Метод Рунге-Китта p=4
k1(x) := f(x)
k2(x, h) := f(x + h/2*k1(x))
k3(x, h) := f(x + h/2*k2(x, h))
k4(x, h) := f(x + h*k3(x, h))
xrk[m + 1] := xrk[m] + h/6*(k1(xrk[m]) + 2*k2(xrk[m], h) + 2*k3(xrk[m], h) + k4(xrk[m], h))
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k1(x) := f(x)
k2(x, h) := f(x + h/2*k1(x))
k3(x, h) := f(x + h/2*k2(x, h))
k4(x, h) := f(x + h*k3(x, h))
xrk2[m2 + 1] := xrk2[m2] + h2/6*(k1(xrk2[m2]) + 2*k2(xrk2[m2], h2) + 2*k3(xrk2[m2], h2) + k4(xrk2[m2], h2))
δrk := |xrk[n] - xrk2[2*n]|*2^4/|2^4 - 1|
δrk = 5.47118e-12
k1(x, h) := h*f(x)
k2(x, h) := h*f(x + 1/3*k1(x, h))
k3(x, h) := h*f(x + 2/3*k2(x, h))
x4[m + 1] := x4[m] + 1/4*k1(x4[m], h) + 3/4*k3(x4[m], h)
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k1(x, h) := h*f(x)
k2(x, h) := h*f(x + 1/3*k1(x, h))
k3(x, h) := h*f(x - 1/3*k1(x, h) + k2(x, h))
k4(x, h) := h*f(x + k1(x, h) - k2(x, h) + k3(x, h))
x42[m2 + 1] := x42[m2] + 1/8*k1(x42[m2], h2) + 3/8*k2(x42[m2], h2) + 3/8*k3(x42[m2], h2) + 1/8*k4(x42[m2], h2)
δ4 := |x4[n] - x42[2*n]|*2^4/|2^4 - 1|
δ4 = 9.83477e-9
