f(x) := (1 + 1/(x^2 + 2))^cos(x)
# 10 узлов
n := 10
a := 0
b := 10
ii := 0 .. n
h := (b - a)/n
xi[ii] := a + ii*h
yi[ii] := f(xi[ii])
i := 0 .. n
j := 0 .. n
Q(x) := sum(yi[i]*product(if(i == j, 1, (x - xi[j])/(xi[i] - xi[j])), j), i)
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# 70 узлов
n := 70
ii := 0 .. n
h := (b - a)/n
xi[ii] := a + ii*h
yi[ii] := f(xi[ii])
i := 0 .. n
j := 0 .. n
Q(x) := sum(yi[i]*product(if(i == j, 1, (x - xi[j])/(xi[i] - xi[j])), j), i)
# 71 узел (влияние вычислительной погрешности)
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# 5 узлов
n := 5
ii := 0 .. n
h := (b - a)/n
xi[ii] := a + ii*h
yi[ii] := f(xi[ii])
i := 0 .. n
j := 0 .. n
Q(x) := sum(yi[i]*product(if(i == j, 1, (x - xi[j])/(xi[i] - xi[j])), j), i)
# 5 узлов (малое количество узлов)
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# Узлы Чебышева
n := 71
ii := 0 .. n
h := (b - a)/n
xi[ii] := a + ii*h
yi[ii] := f(xi[ii])
D := (xi[n] - xi[0])/2
x0 := (xi[0] + xi[n])/2
xi[ii] := x0 + D*cos(π/2*(2*ii + 1)/(n + 1))
yi[ii] := f(xi[ii])
i := 0 .. n
j := 0 .. n
Q(x) := sum(yi[i]*product(if(i == j, 1, (x - xi[j])/(xi[i] - xi[j])), j), i)
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